# LAMMPS script on the mean squared displacement of 10-mer
# settings
# a 3D 60 box
variable      x equal 60
variable      y equal 30
variable      z equal 30
# temperature t = 1
variable      t equal 1
#variable      rho equal 0.7
neigh_modify  delay 0 check yes one 200000 page 2000000


# System setup

units         lj
dimension     3
atom_style    bond
bond_style    harmonic
pair_style    lj/cut 3
processors    1 2 2
read_data     data.nowall

velocity      all create $t 97287

group         polymer type 1

fix           1 polymer nve
fix           2 polymer langevin $t $t 1 1209


timestep      0.01
# equilibration run
thermo        1000
run           10000

reset_timestep 0
compute       com polymer com
compute       g polymer gyration
compute       msd polymer msd
run 5000
dump          pos polymer custom 10 pos.txt xu yu zu
thermo_style custom c_com[1] c_g c_msd[4]
thermo        1
run 1000000
